*Heading
** Job name: Trebuchet Model name: Model-1
** Generated by: Abaqus/CAE 6.11-1
*parameter
projectile_mass = {{ projectile.mass }}
cw_mass = {{ cw.mass }}
sling_x = {{ sling.x }}
sling_y = {{ sling.y }}
sling_end_x = {{ sling_end.x }}
sling_end_y = {{ sling_end.y }}
cw_end_x = {{ cw_end.x }}
cw_end_y = {{ cw_end.y }}
cw_x = {{ cw.x }}
cw_y = {{ cw.y }}
*Preprint, echo=NO, model=NO, history=NO, contact=NO
**
** PARTS
**
**
** ASSEMBLY
**
*Assembly, name=Assembly
** Axle
*Node
      1,           0.,           0.,           0.
** CW end of beam
*Node
      2,  <cw_end_x>,  <cw_end_y>,           0.
*Node
      3,  <cw_end_x>,  <cw_end_y>,           0.
** CW
*Node
      4,  <cw_x>,  <cw_y>,           0.
** Sling end of beam
*Node
      5, <sling_end_x>, <sling_end_y>,           0.
*Node
      6, <sling_end_x>, <sling_end_y>,           0.
** Projectile at end of sling
*Node
      7,  <sling_x>, <sling_y>,           0.
*Element, type=CONN3D2
11, 6, 7
12, 1, 5
13, 3, 4
14, 1, 2
*Connector Section, elset=_PickedSet21
Beam,
*Element, type=CONN3D2
15, 5, 6
16, 2, 3
*Connector Section, elset=_PickedSet22
Join, Rotation
*Element, type=CONN3D2
17,  , 1
*Connector Section, elset=_PickedSet25
Join, Rotation
*Nset, nset=Wire-1-Set-2, generate
 1,  7,  1
*Elset, elset=Wire-1-Set-2, generate
 11,  16,   1
*Elset, elset=_PickedSet21, internal, generate
 11,  14,   1
*Elset, elset=_PickedSet22, internal
 15, 16
*Nset, nset=Wire-2-Set-1
 1,
*Elset, elset=Wire-2-Set-1
 17,
*Elset, elset=_PickedSet25, internal
 17,
*Nset, nset=axle
 1,
*Nset, nset=projectile
 7,
*Elset, elset=axle
 17,
*Nset, nset=CW_hinge
 2, 3
*Elset, elset=CW_hinge
 16,
*Nset, nset=Sling_hinge
 5, 6
*Elset, elset=Sling_hinge
 15,
*Nset, nset=_PickedSet31, internal, generate
 1,  7,  1
*Element, type=MASS, elset=_PickedSet26_CW_MASS_
1, 4
*Mass, elset=_PickedSet26_CW_MASS_
<cw_mass>,
*Element, type=ROTARYI, elset=_PickedSet26_CW_ROTI_
2, 4
*Rotary Inertia, elset=_PickedSet26_CW_ROTI_
0.001, 0.001, 0.001, 0., 0., 0.
*Element, type=MASS, elset=_PickedSet27_Projectile_MASS_
3, 7
*Mass, elset=_PickedSet27_Projectile_MASS_
<projectile_mass>,
*Element, type=ROTARYI, elset=_PickedSet27_Projectile_ROTI_
4, 7
*Rotary Inertia, elset=_PickedSet27_Projectile_ROTI_
0.001, 0.001, 0.001, 0., 0., 0.
*Element, type=MASS, elset=_PickedSet32_small_MASS_
5, 1
6, 3
7, 6
*Mass, elset=_PickedSet32_small_MASS_
0.001,
*Element, type=ROTARYI, elset=_PickedSet32_small_ROTI_
8, 1
9, 3
10, 6
*Rotary Inertia, elset=_PickedSet32_small_ROTI_
0.001, 0.001, 0.001, 0., 0., 0.
*End Assembly
**
** BOUNDARY CONDITIONS
**
** Name: BC-1 Type: Displacement/Rotation
*Boundary
_PickedSet31, 3, 3
_PickedSet31, 4, 4
_PickedSet31, 5, 5
** ----------------------------------------------------------------
**
** STEP: Step-1
**
*Step, name=Step-1, nlgeom=YES, inc=1000
*Dynamic,application=MODERATE DISSIPATION,initial=NO
0.001,0.5,5e-07,0.001
**
** LOADS
**
** Name: gravity   Type: Gravity
*Dload
, GRAV, 9.81, 0., -1., 0.
**
** OUTPUT REQUESTS
**
*Restart, write, frequency=0
**
** FIELD OUTPUT: F-Output-1
**
*Output, field, variable=PRESELECT, frequency=1
**
** HISTORY OUTPUT: CW_hinge
**
*Output, history, frequency=1
*Element Output, elset=CW_hinge
CTF1, CTF2, CTF3, CTM1, CTM2, CTM3, CU1, CU2, CU3, CUR1, CUR2, CUR3
**
** HISTORY OUTPUT: Sling_hinge
**
*Output, history, frequency=1
*Element Output, elset=Sling_hinge
CTF1, CTF2, CTF3, CTM1, CTM2, CTM3, CU1, CU2, CU3, CUR1, CUR2, CUR3
**
** HISTORY OUTPUT: Axle_hinge
**
*Output, history, frequency=1
*Element Output, elset=axle
CTF1, CTF2, CTF3, CTM1, CTM2, CTM3, CU1, CU2, CU3, CUR1, CUR2, CUR3
**
** HISTORY OUTPUT: H-Output-1
**
*Output, history, variable=PRESELECT
*End Step
